clear

units           metal
dimension       3
boundary        p p p
atom_style      atomic

read_data       structure/M4_SYM_RATIO_ready.data

mass            1 26.9815385
mass            2 63.546

pair_style      eam/alloy
pair_coeff      * * potentials/CuAgAuNiPdPtAlPbFeMoTaWMgCoTiZr_Zhou04.eam.alloy Al Cu

neighbor        2.0 bin
neigh_modify    delay 0 every 1 check yes one 3000 page 30000

compute         peatom all pe/atom
compute         csym all centro/atom fcc

thermo          1000
thermo_style    custom step temp pe etotal press pxx pyy pzz lx ly lz vol atoms

fix             BR all box/relax aniso 0.0 vmax 0.001

min_style       cg
minimize        1.0e-12 1.0e-12 30000 300000

unfix           BR

write_data      outputs/M4_SYM_RATIO_min.data
write_restart   outputs/M4_SYM_RATIO_min.restart
